*Heading
Peirlinck/Kuhl-braincoronal-when used, cite: "On automated model discovery and a universal material subroutine" - M. Peirlinck, K. Linka, J.A. Hurtado, E. Kuhl
** Mathias Peirlinck/Ellen Kuhl - coronal brain slice simulation
** When using, please cite: "On automated model discovery and a universal material subroutine" - M. Peirlinck, K. Linka, J.A. Hurtado, E. Kuhl
*Preprint, echo=NO, model=NO, history=NO, contact=NO
*include, input=UNIVERSAL_PARAM_TYPES.inc
** ----------------------------------------------------------------
*Node
      1,   13.6890001,   0.45629999
      2,   14.5100002,           0.
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*Element, type=CPS3
    1,  5132,  2042,     1
    2,  4902,  2043,  2041
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*Elset, elset=PART-1-1_EGRAY, generate
    1,  7106,     1
*Elset, elset=PART-1-1_EWHITE, generate
  7107,  21302,      1
*orientation,name=ori-1,local directions=2
 1.0,0.0,0.0,0.0,1.0,0.0
 3,0.0
*Solid Section, elset=PART-1-1_EGRAY, material=MATGRAY, orientation=ori-1
,
*Solid Section, elset=PART-1-1_EWHITE, material=MATWHITE, orientation=ori-1
,
*System
*Node
  11819,   51.1500015,   70.2399979,           0.
*Nset, nset=NALL, generate
     1,  11808,      1
*Nset, nset=RP-COM
11819,
*Elset, elset=_SURFSKULLROUND_S1
    6,   16,  257,  536,  547,  681
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*Elset, elset=_SURFSKULLROUND_S2
    1,    8,    9,   16,   50,   52
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*Elset, elset=_SURFSKULLROUND_S3
    4,    6,  188,  205,  532,  535
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*Surface, type=ELEMENT, name=SURFSKULLROUND
_SURFSKULLROUND_S1, S1
_SURFSKULLROUND_S2, S2
_SURFSKULLROUND_S3, S3
*Surface, type=NODE, name=NALL_CNS_
NALL, 1.
*Coupling, constraint name=CDCOUP_COM, ref node=RP-COM, surface=NALL_CNS_
*Distributing, weighting method=UNIFORM
1, 1
2, 2
6, 6
*MATERIAL, name=MATGRAY
*ANISOTROPIC HYPERELASTIC, USER, formulation=invariant, type=incompressible,local directions=2
*PARAMETER TABLE, type="UNIVERSAL_TAB"
1,1,1,0.0,0.0
1,1,2,0.0,0.0
1,1,3,0.0,0.0
1,2,1,0.0,0.0
1,2,2,0.0,0.0
1,2,3,0.0,0.0
2,1,1,0.0,0.0
2,1,2,0.0,0.0
2,1,3,0.9875,0.6339e-3
2,2,1,2.7738,1.3702e-3
2,2,2,1.6495,1.888e-3
2,2,3,1.4026,1.6663e-3
*MATERIAL, name=MATWHITE
*ANISOTROPIC HYPERELASTIC, USER, formulation=invariant, type=incompressible,local directions=2
*PARAMETER TABLE, type="UNIVERSAL_TAB"
1,1,1,0.0,0.0
1,1,2,0.0,0.0
1,1,3,0.0,0.0
1,2,1,0.0,0.0
1,2,2,0.0,0.0
1,2,3,0.0,0.0
2,1,1,1.3862,0.1598e-3
2,1,2,0.2398,0.49e-3
2,1,3,0.0,0.0
2,2,1,0.0,0.0
2,2,2,1.8893,1.6859e-3
2,2,3,1.1789,1.9113e-3
*Foundation
_SURFSKULLROUND_S1, F1, 0.0001
_SURFSKULLROUND_S2, F2, 0.0001
_SURFSKULLROUND_S3, F3, 0.0001
** ----------------------------------------------------------------
*Step, name=Step-1, nlgeom=YES
*Static
1., 1., 0.01, 1.
*Cload
RP-COM, 1, -0.0141
RP-COM, 2, -0.0141
*Restart, write, frequency=0
*Output, field, number interval=10
*Node Output
RF, U
*Element Output, directions=YES
NE, S
*Output, history, variable=PRESELECT
*End Step
